# Лабораторная работа 1 Задача 1
# от 11 сентября
t := 0, 1 .. 10000
λ := 10^-4
P(t) := e^(-λ*t)
P1(t, n) := P(t)^n
P2(t, n, m) := 1 - (1 - P(t)^n)^m
P3(t, n) := 1 - (1 - P(t))^n
P4(t, n, m) := (1 - (1 - P(t))^n)^m
P5(t) := P(t)^5 + 5*P(t)^4*(1 - P(t)) + 8*P(t)^3*(1 - P(t))^2 + 2*P(t)^2*(1 - P(t))^3
P6(t) := P(t)*P4(t, 2, 2) + (1 - P(t))*P2(t, 2, 2)
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P7(t) := 1 - (1 - P(t)^2)^2*(1 - P(t)^3)^2
q(t) := 1 - P(t)
P8(t) := ((1 - q(t))^2)^2*((1 - q(t))^3)^2
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