# Лабораторная работа 2 Задача 1
# от 25 сентября
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λ1 := 10^-4
λ2 := 2*10^-4
μ1 := 1.0
μ2 := 1.2
Given
-(λ1 + λ2)*P0 + μ1*P1 + μ2*P2 == 0
P0 + P1 + P2 + P3 == 1
-(μ1 + λ2)*P1 + λ1*P0 == 0
-μ1*P3 + λ2*P1 + λ1*P2 == 0
a := Find(P0, P1, P2, P3) → [0.999733371112; 9.99533464419e-5; 0.00016663888741; 3.66545580293e-8]
K := a[0] + a[1] + a[2] → 0.999999963345
