# Лабораторная работа 2 Задача 2
# от 25 сентября
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λ1 := 10^-4
λ2 := 2*10^-4
μ1 := 1.0
μ2 := 1.2
Given
P0 + P1 + P2 + P3 + P4 + P5 + P6 + P7 == 1
-(λ1 + λ2)*P0 + μ2*P1 + μ1*P2 == 0
-(μ2 + λ1 + λ2)*P1 + λ2*P0 + μ2*P3 == 0
-(μ1 + λ1 + λ2)*P2 + λ1*P0 + μ2*P4 + μ1*P5 == 0
-μ2*P3 + λ2*P1 == 0
-(μ2 + λ1 + λ2)*P4 + λ1*P1 + λ2*P2 + μ2*P6 + μ1*P7 == 0
-μ1*P5 + λ1*P2 == 0
-μ2*P6 + λ2*P4 == 0
-μ1*P7 + λ1*P4 == 0
a := Find(P0, P1, P2, P3, P4, P5, P6, P7) → [0.999733333343; 0.000166608338196; 9.99899941682e-5; 2.7768056366e-8; 3.0549027211e-8; 9.99899941682e-9; 5.09150453517e-12; 3.0549027211e-12]
K := a[0] + a[1] + a[2] + a[4] → 0.999999962225
