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# Лабораторная работа 3 Задача 1
# от 9 октября
λ1 := 10^-4
λ2 := 10^-4
μ1 := 1
μ21 := 1.2
μ22 := 0.3
Given
p41 + p31 + p40 + p4F + p3F == 1
-p41*(4*λ1 + λ2) + μ1*p31 + μ22*p4F == 0
-p40*μ21 + λ2*p41 == 0
-p4F*(λ1 + μ22) + μ1*p3F + μ21*p40 == 0
-p31*μ1 + 4*λ1*p41 == 0
-p3F*μ1 + λ1*p4F == 0
a := Find(p41, p31, p40, p4F, p3F) → [0.999183966455; 0.000399673586582; 8.32653305379e-5; 0.000333061322152; 3.33061322152e-8]
k := a[0] → 0.999183966455
