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# Лабораторная работа 3 Задача 2
# от 9 октября
λ1 := 10^-4
λ2 := 10^-4
μ1 := 1
μ21 := 1.2
μ22 := 0.3
Given
p41 + p31 + p21 + p11 + p01 + p40 + p30 + p20 + p10 + p4F + p3F == 1
-p41*(4*λ1 + λ2) + μ1*p31 + μ22*p4F == 0
-p31*(μ1 + λ2 + 3*λ1) + 4*λ1*p41 + μ1*p21 == 0
-p21*(μ1 + λ2 + 2*λ1) + 3*λ1*p31 + μ1*p11 == 0
-p11*(μ1 + λ2 + λ1) + 2*λ1*p21 + μ1*p01 == 0
-p01*μ1 + λ1*p11 == 0
-p40*μ21 + λ2*p41 + λ2*p4F + μ1*p30 == 0
-p30*μ1 + λ2*p31 + μ1*p20 == 0
-p20*μ1 + λ2*p21 + μ1*p10 == 0
-p10*μ1 + λ2*p11 == 0
-p4F*(λ1 + μ22 + λ2) + μ1*p3F + μ21*p40 == 0
-p3F*μ1 + λ1*p4F == 0
a := Find(p41, p31, p21, p11, p01, p40, p30, p20, p10, p4F, p3F) → [0.999183652454; 0.000399633485643; 1.1987805549e-7; 2.39732137766e-11; 2.39732137766e-15; 8.33263833592e-5; 3.99753387671e-8; 1.19902028704e-11; 2.39732137766e-15; 0.000333194468614; 3.33194468614e-8]
k := a[0] + a[1] + a[2] + a[3] → 0.999583405841
