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# Лабораторная работа 3 Задача 1
# от 9 октября
λ1 := 10^-4
λ2 := 10^-4
μ1 := 1
μ21 := 1.2
μ22 := 0.3
Given
-4*λ1*P0 - λ2*P0 + μ1*P1 + μ22*P9 == 0
-3*λ1*P1 - λ2*P1 - μ1*P1 + 4*λ1*P0 + μ22*P10 + μ1*P2 == 0
-2*λ1*P2 - λ2*P2 - μ1*P2 + 3*λ1*P1 + μ22*P12 + μ1*P3 == 0
-λ1*P3 - λ2*P3 - μ1*P3 + 2*λ1*P2 + μ22*P12 + μ1*P4 == 0
-μ1*P4 + λ1*P3 == 0
-μ21*P5 + λ2*P0 + λ2*P9 == 0
-μ21*P6 + λ2*P1 + λ2*P10 == 0
-μ21*P7 + λ2*P2 + λ2*P11 == 0
-μ21*P8 + λ2*P3 + λ2*P12 == 0
-μ22*P9 - λ2*P9 - λ1*P9 + μ1*P10 + μ21*P5 == 0
-μ22*P10 - λ2*P10 - λ1*P10 - μ1*P10 + μ1*P11 + μ21*P6 + λ1*P9 == 0
-μ22*P11 - λ2*P11 - λ1*P11 - μ1*P11 + μ1*P12 + μ21*P7 + λ1*P10 == 0
-μ22*P12 - λ2*P12 - λ1*P12 - μ1*P12 + μ1*P13 + μ21*P8 + λ1*P11 == 0
P0 + P1 + P2 + P3 + P4 + P5 + P6 + P7 + P8 + P9 + P10 + P11 + P12 + P13 == 1
a := Find(P0, P1, P2, P3, P4, P5, P6, P7, P8, P9, P10, P11, P12, P13) → [0.99918370877; 0.000399650421119; 1.19884919397e-7; 2.48665170065e-11; 2.48665170065e-15; 8.32930705734e-5; 3.33088997766e-8; 9.99173032964e-12; 2.31999302247e-15; 0.000333138110887; 5.63762001074e-8; 1.58445590443e-11; 2.97339926305e-12; 3.86164527429e-12]
k := a[0] + a[1] + a[2] + a[3] → 0.999583479101
