# Лабораторная работа 4 Задача 1
# от 23 октября
v1 := 0.1
v2 := 0.1
n := 4
C0 := 10
C01 := 0.01
h := -10
h1 := -0.1
λ := 0, 0.01 .. (1/v1)
t := 2*v1
t2 := 3*v1
t3 := 5*v1
T1(λ) := v1/(1 - λ*v1)
B(λ) := (1 - λ*v1/n*e^((λ/n - 1/v1)*t))*(1 - λ*v2*e^((λ - 1/v2)*(t - T1(λ))))
B1(λ) := (1 - λ*v1/n*e^((λ/n - 1/v1)*t2))*(1 - λ*v2*e^((λ - 1/v2)*(t2 - T1(λ))))
B2(λ) := (1 - λ*v1/n*e^((λ/n - 1/v1)*t3))*(1 - λ*v2*e^((λ - 1/v2)*(t3 - T1(λ))))
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R1(λ) := λ*(C0*B(λ) + C01*(1 - B(λ)))
R2(λ) := λ*(C0*B(λ) + h*(1 - B(λ)))
R3(λ) := λ*(C0*B1(λ) + C01*(1 - B1(λ)))
R4(λ) := λ*(C0*B1(λ) + h*(1 - B1(λ)))
R5(λ) := λ*(C0*B2(λ) + C01*(1 - B2(λ)))
R6(λ) := λ*(C0*B2(λ) + h*(1 - B2(λ)))
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f(λ) := d/dλ(R2(λ))
f1(λ) := d/dλ(R4(λ))
f2(λ) := d/dλ(R6(λ))
R7(λ) := λ*(C0*B(λ) + h1*(1 - B(λ)))
Rh(λ) :=
    R2(λ) if (f(λ) > 0)
    R7(λ) otherwise
R8(λ) := λ*Rh(λ)
R9(λ) := λ*(C0*B1(λ) + h1*(1 - B1(λ)))
Rh1(λ) :=
    R4(λ) if (f1(λ) > 0)
    R9(λ) otherwise
R10(λ) := λ*Rh1(λ)
R11(λ) := λ*(C0*B2(λ) + h1*(1 - B2(λ)))
Rh2(λ) :=
    R6(λ) if (f2(λ) > 0)
    R11(λ) otherwise
R12(λ) := λ*Rh2(λ)
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