# Лабораторная работа 5 Задача 1
# от 6 ноября
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v := 0.01
v1 := 0.002
n := 10
n1 := 1, 2 .. 9
C1 := 1
C2 := 0.5
h1 := -2
h2 := -1
α := 0.5
λ := 0, 0.01 .. (1/v)
t1 := 2*v
t2 := 3*v
T1(λ, n1) := v/(1 - α*λ*v1/n1)
T2(λ, n1) := v/(1 - (1 - α)*λ*v/(n - n1))
B11(λ, n1) := (1 - α*λ*v*e^(t1*(α*λ/n1 - 1/v))/n)
B21(λ, n1) := (1 - (1 - α)*λ*v/(n - n1)*e^(t2*((1 - α)*λ/(n - n1) - 1/v)))
B12(λ, n1) := 1 - λ*v1*e^((t1 - T1(λ, n1))*(λ - 1/v1))
B22(λ, n1) := 1 - λ*v1*e^((t2 - T2(λ, n1))*(λ - 1/v1))
B1(λ, n1) := B11(λ, n1)*B12(λ, n1)
B2(λ, n1) := B21(λ, n1)*B22(λ, n1)
B(λ, n1) := α*B1(λ, n1) + (1 - α)*B2(λ, n1)
R1(λ, n1) := λ*(α*(B1(λ, n1)*C1 + (1 - B1(λ, n1))*h1) + (1 - α)*(B2(λ, n1)*C2 + (1 - B2(λ, n1))*h2))
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