# Лабораторная работа 7 Задача 1
# от 4 декабря
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n := 10
C01 := 2
C02 := 0.5
C11 := -0.2
C12 := -0.1
C21 := -3
C22 := -1
L := 1024
L0 := 64
S := 10^6
b := 10^-4
B := (1 - b)^(L + L0)
V := (L + L0)/S
t1 := 2*V
t2 := 5*V
B11(λ, n1, α) := 1 - (λ*α*V/n1*e^((λ*α/n1 - 1/V)*t1))
B12(λ, n1, α) := 1 - (λ*V/(n - n1)*e^((λ/(n - n1) - 1/V)*t1))
B2(λ, n1, α) := 1 - (λ*V/(n - n1)*e^((λ/(n - n1) - 1/V)*t2))
I(λ, n1, α) := λ*(α*(B^2*(1 - (1 - B11(λ, n1, α))*(1 - B12(λ, n1, α)))*C01 + B^2*(1 - B11(λ, n1, α))*(1 - B12(λ, n1, α)) + B*(1 - B)*B11(λ, n1, α)*C01 + B*(1 - B)*B12(λ, n1, α)*C01 + B*(1 - B)*(1 - B11(λ, n1, α))*C11 + B*(1 - B)*(1 - B12(λ, n1, α))*C11 + (1 - B)^2*C21) + (1 - α)*(B*B2(λ, n1, α)*C02 + B*(1 - B2(λ, n1, α))*C12) + (1 - B)*C22)
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'
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